**
** Heading +++++++++++++++++++++++++++++++++++++++++++++++++
**
*Heading
Hash: TxqOgwkY, Date: 05/12/2023, Unit system: MM_TON_S_C
**
** Nodes +++++++++++++++++++++++++++++++++++++++++++++++++++
**
*Node
1, 1.00000000E+002, 7.50000000E+001, 0.00000000E+000
2, -1.00000000E+002, 7.50000000E+001, 0.00000000E+000
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**
** Elements ++++++++++++++++++++++++++++++++++++++++++++++++
**
*Element, Type=S8, Elset=Shell_part-1
1, 1, 5, 141, 140, 1272, 1273, 1274, 1275
2, 5, 6, 142, 141, 1276, 1277, 1278, 1273
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**
** Node sets +++++++++++++++++++++++++++++++++++++++++++++++
**
*Nset, Nset=Internal_Selection-1_Displacement_rotation-1
1, 2, 3, 4, 5, 6
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*Nset, Nset=Internal_Selection-1_Displacement_rotation-2
1, 2, 5, 6, 7, 8
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*Nset, Nset=Internal_Selection-1_Displacement_rotation-3
1, 4, 112, 113, 114, 115
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*Nset, Nset=Internal-1_Internal_Selection-1_Normal_shell_edge_load-1
2, 3, 4, 44, 45, 46
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**
** Element sets ++++++++++++++++++++++++++++++++++++++++++++
**
*Elset, Elset=Internal_Selection-1_Shell_section-1
1, 2, 3, 4, 5, 6
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*Elset, Elset=Internal-1_Internal_Selection-1_Normal_shell_edge_load-1_S4
40, 69
*Elset, Elset=Internal-1_Internal_Selection-1_Normal_shell_edge_load-1_S3
41, 42, 43, 44, 45, 46
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**
** Surfaces ++++++++++++++++++++++++++++++++++++++++++++++++
**
*Surface, Name=Internal_Selection-1_Normal_shell_edge_load-1, Type=Element
Internal-1_Internal_Selection-1_Normal_shell_edge_load-1_S4, S4
Internal-1_Internal_Selection-1_Normal_shell_edge_load-1_S3, S3
**
** Physical constants ++++++++++++++++++++++++++++++++++++++
**
**
** Materials +++++++++++++++++++++++++++++++++++++++++++++++
**
*Material, Name=Material-1
*Elastic
200000, 0.3
**
** Sections ++++++++++++++++++++++++++++++++++++++++++++++++
**
*Shell section, Elset=Internal_Selection-1_Shell_section-1, Material=Material-1, Offset=0
4
**
** Pre-tension sections ++++++++++++++++++++++++++++++++++++
**
**
** Constraints +++++++++++++++++++++++++++++++++++++++++++++
**
**
** Surface interactions ++++++++++++++++++++++++++++++++++++
**
**
** Contact pairs +++++++++++++++++++++++++++++++++++++++++++
**
**
** Amplitudes ++++++++++++++++++++++++++++++++++++++++++++++
**
**
** Initial conditions ++++++++++++++++++++++++++++++++++++++
**
**
** Steps +++++++++++++++++++++++++++++++++++++++++++++++++++
**
**
** Step-1 ++++++++++++++++++++++++++++++++++++++++++++++++++
**
*Step
*Buckle
3, 0.01
**
** Boundary conditions +++++++++++++++++++++++++++++++++++++
**
*Boundary, op=New
** Name: Displacement_rotation-1
*Boundary
Internal_Selection-1_Displacement_rotation-1, 3, 3, 0
** Name: Displacement_rotation-2
*Boundary
Internal_Selection-1_Displacement_rotation-2, 2, 2, 0
** Name: Displacement_rotation-3
*Boundary
Internal_Selection-1_Displacement_rotation-3, 1, 1, 0
**
** Loads +++++++++++++++++++++++++++++++++++++++++++++++++++
**
*Cload, op=New
*Dload, op=New
** Name: Normal_shell_edge_load-1
*Dload
Internal-1_Internal_Selection-1_Normal_shell_edge_load-1_S4, EDNOR2, 1
Internal-1_Internal_Selection-1_Normal_shell_edge_load-1_S3, EDNOR1, 1
**
** Defined fields ++++++++++++++++++++++++++++++++++++++++++
**
**
** History outputs +++++++++++++++++++++++++++++++++++++++++
**
**
** Field outputs +++++++++++++++++++++++++++++++++++++++++++
**
*Node file
RF, U
*El file
S, E
**
** End step ++++++++++++++++++++++++++++++++++++++++++++++++
**
*End step
