We occasionally have a situation where a flexible film needs to buckle as part of the loading. See figure. As the film passes through the buckling, the run will often diverge. If the “pop” succeeds, the run will once again be stable and the run will finish without issue.
A trick we use is to put a very low stiffness contact pair across both sides of the film to a dummy structure. The film will get caught in the very low stiffness springs, which can be enough to keep it from diverging. This will sometimes work, but it is not completely reliable and is not always convenient. I have linked a sample model. If you run as is, it should crash at t=0.02. Uncomment the contact commands and it will run to t=1.0.
drive.google.com 5 5
buckling_trick.inp 5
Google Drive file.
I’d like to figure out a way to put in some “inertia relief” into the system, a feature available in some codes, that essentially puts a small stiffness against the motion of each cell. It is essentially faking a dynamic inertial reaction without the overhead of a full time-based transient. Since CCX does not have this feature, I’m looking for an alternative. Dumb tricks are always welcome!
*HEADING
Flexible film buckling: https://calculix.discourse.group/t/getting-past-a-bucking-point/136
*NODE, NSET=NALL
1,0.0006766242921297,0.0006806909056472,0.001860334182587
2,0.003813791848291,-2.690448713521E-05,0.0018868914963
3,0.0068090689,-5.811E-06,0.00188193474
4,0.0006777268462199,0.0006677957283115,0.00124622321514
5,7.482476544585E-06,0.0007247143479057,0.001873969773565
6,0.0031909311,-5.811E-06,0.00188193474
7,0.001335998498746,0.0005625186951214,0.001865506143981
8,0.0086849654,0.000453738,0.00062760008
9,0.00932227315378,0.0006677957283115,0.00124622321514
10,0.00932337570787,0.0006806909056472,1.466581741274E-05
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*ELEMENT,TYPE=C3D20, ELSET=FILM
1,66,59,75,71,72,85,60,65,137,138,139,140,145,146,147,
148,141,142,143,144
2,59,78,80,75,85,56,52,60,149,150,151,138,154,155,156,
146,142,152,153,143
3,71,75,64,69,65,60,74,68,139,157,158,159,147,162,163,
164,144,143,160,161
4,51,66,71,61,93,72,65,84,165,140,166,167,170,148,171,
172,168,141,144,169
5,78,62,77,80,56,81,57,52,173,174,175,150,178,179,180,
155,152,176,177,153
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*ELEMENT,TYPE=C3D8, ELSET=BUMPERS
49,463,494,531,477,464,495,532,478
50,493,507,540,530,494,508,541,531
51,494,508,541,531,495,509,542,532
52,495,509,542,532,496,510,435,533
53,496,510,435,533,497,512,438,534
54,497,512,438,534,498,513,445,535
55,498,513,445,535,499,514,450,536
56,499,514,450,536,500,517,455,537
57,500,517,455,537,503,518,456,538
58,464,495,532,478,465,496,533,482
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*SURFACE,NAME=s1
79,S3
78,S3
57,S3
69,S3
56,S3
68,S3
55,S3
59,S3
54,S3
58,S3
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*SURFACE,NAME=s2
2,S1
1,S1
6,S1
5,S1
4,S1
3,S1
12,S1
11,S1
10,S1
9,S1
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*SURFACE,NAME=pfaces
7,S1
4,S1
13,S1
12,S1
3,S1
9,S1
8,S1
2,S1
19,S1
18,S1
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*MATERIAL,NAME=mat_film
*ELASTIC,TYPE=ISOTROPIC
1.0E08,0.3
** Medium (M) material version:
*material, name=786027-S5_ContiTech-M
*elastic
4.4286E+03, 0.49
*density
1.4E-06
***DAMPING,ALPHA=10000.,BETA=0.
**
** Hard (H) material version:
*material, name=786027-S5_ContiTech-H
*elastic
6.643E+03, 0.49
*density
1.4E-06
***DAMPING,ALPHA=10000.,BETA=0.
**
***SOLID SECTION,ELSET=bumpers,MATERIAL=mat_film
***SOLID SECTION,ELSET=film,MATERIAL=mat_film
*SOLID SECTION,ELSET=bumpers,MATERIAL=786027-S5_ContiTech-M
*SOLID SECTION,ELSET=film,MATERIAL=786027-S5_ContiTech-M
*BOUNDARY
5,1,,0
5,2,,0
5,3,,0
18,1,,0
18,2,,0
18,3,,0
25,1,,0
25,2,,0
25,3,,0
29,1,,0
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*AMPLITUDE,NAME=Aconstant
0,1
*AMPLITUDE,NAME=A0
0,0
1,1
*****************************************************************
******* UNCOMMENT THESE LINES AND RUN WILL GET PAST BUCKING "POP"
** *CONTACT PAIR,INTERACTION=SI_2,TYPE=SURFACE TO SURFACE
** s2,s1
** *SURFACE INTERACTION,NAME=SI_2
** *SURFACE BEHAVIOR,PRESSURE-OVERCLOSURE=LINEAR
** 10000
*****************************************************************

*STEP,NLGEOM=YES,INC=100
*DYNAMIC
1.E-06,1.,1.E-08,0.1
*DSLOAD,AMPLITUDE=A0
pfaces,P,34000
*NODE FILE,GLOBAL=YES
U,RF
*EL FILE
S
*END STEP
