**
** Equation based amplitude
**
** Changes:
** 2026/04/27: 2 equation based amplitudes.
**
*HEADING
Flexible film buckling: https://calculix.discourse.group/t/getting-past-a-bucking-point/136
**
*NODE, NSET=NALL
1,0.0006766242921297,0.0006806909056472,0.001860334182587
2,0.003813791848291,-2.690448713521E-05,0.0018868914963
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*ELEMENT,TYPE=C3D20, ELSET=FILM
1,66,59,75,71,72,85,60,65,137,138,139,140,145,146,147,
148,141,142,143,144
2,59,78,80,75,85,56,52,60,149,150,151,138,154,155,156,
146,142,152,153,143
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*ELEMENT,TYPE=C3D8, ELSET=BUMPERS
49,463,494,531,477,464,495,532,478
50,493,507,540,530,494,508,541,531
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*SURFACE,NAME=s1
79,S3
78,S3
57,S3
69,S3
56,S3
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60,S5
*SURFACE,NAME=s2
2,S1
1,S1
6,S1
5,S1
4,S1
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45,S2
*SURFACE,NAME=pfaces
7,S1
4,S1
13,S1
12,S1
3,S1
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1,S1
*MATERIAL,NAME=mat_film
*ELASTIC,TYPE=ISOTROPIC
1.0E08,0.3
** Medium (M) material version:
*material, name=786027-S5_ContiTech-M
*elastic
4.4286E+03, 0.49
*density
1.4E-06
***DAMPING,ALPHA=10000.,BETA=0.
**
** Hard (H) material version:
*material, name=786027-S5_ContiTech-H
*elastic
6.643E+03, 0.49
*density
1.4E-06
***DAMPING,ALPHA=10000.,BETA=0.
**
***SOLID SECTION,ELSET=bumpers,MATERIAL=mat_film
***SOLID SECTION,ELSET=film,MATERIAL=mat_film
*SOLID SECTION,ELSET=bumpers,MATERIAL=786027-S5_ContiTech-M
*SOLID SECTION,ELSET=film,MATERIAL=786027-S5_ContiTech-M
*BOUNDARY
5,1,,0
5,2,,0
5,3,,0
18,1,,0
18,2,,0
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542,3,,0
*AMPLITUDE,NAME=Aconstant
0,1
*AMPLITUDE,NAME=A0
0,0
1,1
*AMPLITUDE,NAME=A0_T, EQUATION
T
*AMPLITUDE,NAME=AEQUCONST
1.
*****************************************************************
******* UNCOMMENT THESE LINES AND RUN WILL GET PAST BUCKING "POP"
** *CONTACT PAIR,INTERACTION=SI_2,TYPE=SURFACE TO SURFACE
** s2,s1
** *SURFACE INTERACTION,NAME=SI_2
** *SURFACE BEHAVIOR,PRESSURE-OVERCLOSURE=LINEAR
** 10000
*****************************************************************

*STEP,NLGEOM=YES,INC=100
*DYNAMIC
1.E-06,1.,1.E-08,0.1
*DSLOAD,AMPLITUDE=A0_T
pfaces,P,34000
*NODE FILE,GLOBAL=YES
U,RF
*EL FILE
S
*END STEP
