**
**   Structure: two cubes on top of each other.
**   Test objective: gap conductance
**                   coupled temperature-displacement
**                   no contact pressure
**
*NODE, NSET=Nall
       1,1.000000000000e+00,1.000000000000e+00,-1.490120005165e-08
       2,1.000000000000e+00,0.000000000000e+00,-1.490120005165e-08
       3,1.000000000000e+00,0.000000000000e+00,1.000000000000e+00
       4,1.000000000000e+00,1.000000000000e+00,1.000000000000e+00
       5,-7.450579986301e-09,1.000000000000e+00,-1.490120005165e-08
       6,-7.450579986301e-09,0.000000000000e+00,-1.490120005165e-08
       7,-7.450579986301e-09,0.000000000000e+00,1.000000000000e+00
       8,-7.450579986301e-09,1.000000000000e+00,1.000000000000e+00
       9,5.000000000000e-01,6.414210000000e-01,1.020000000000e+00
      10,6.414210000000e-01,5.000000000000e-01,1.020000000000e+00
      11,6.414210000000e-01,5.000000000000e-01,1.220000000000e+00
      12,5.000000000000e-01,6.414210000000e-01,1.220000000000e+00
      13,3.585790000000e-01,5.000000000000e-01,1.020000000000e+00
      14,5.000000000000e-01,3.585790000000e-01,1.020000000000e+00
      15,5.000000000000e-01,3.585790000000e-01,1.220000000000e+00
      16,3.585790000000e-01,5.000000000000e-01,1.220000000000e+00
*ELEMENT, TYPE=C3D8, ELSET=Eall
     1,     1,     2,     3,     4,     5,     6,     7,     8
     2,     9,    10,    11,    12,    13,    14,    15,    16
*NSET,NSET=Nfix1
1,
2,
5,
6,
*NSET,NSET=Nfix2
11,
12,
15,
16,
*BOUNDARY
Nfix1,1,3
Nfix2,3,3
15,1,2
12,1,1
*MATERIAL,NAME=EL
*ELASTIC
210000.,.3
*DENSITY
1.
*EXPANSION
60.E-6
*CONDUCTIVITY
1.
*SPECIFIC HEAT
1.e-4
*SOLID SECTION,ELSET=Eall,MATERIAL=EL
*ELSET,ELSET=Emast
1
*NSET,NSET=Nslav
9,10,13,14
*SURFACE,NAME=Smast
Emast,S5
*SURFACE,NAME=Sslav,TYPE=NODE
Nslav
*CONTACT PAIR,INTERACTION=SI1,TYPE=NODE TO SURFACE
Sslav,Smast
*SURFACE INTERACTION,NAME=SI1
*SURFACE BEHAVIOR,PRESSURE-OVERCLOSURE=LINEAR
1.e-20,3.
*GAP CONDUCTANCE
1.
*INITIAL CONDITIONS,TYPE=TEMPERATURE
Nall,0.
** +++++++++++++++++++++++++++++++++++++++++++++++++++++
*STEP,NLGEOM
*COUPLED TEMPERATURE-DISPLACEMENT
.000001,.0024,0.,0.00005
*CONTROLS,PARAMETERS=TIME INCREMENTATION
100,100,9,100,10,4,,5
.25,.5,.75,.85,,,1.5,,
*BOUNDARY
Nfix1,11,11,0.
Nfix2,11,11,2000.
*CONTACT PRINT
CDIS, CPRES
**
*NODE FILE
U, NT
*EL FILE
S, E
*CONTACT FILE
CDIS, CPRES
*END STEP
