**
**   Structure: half open air column (ideal gas)
**   Test objective: modal dynamic calculation:
**                   pressure increase on open end
**                   air is modeled as linear elastic
**                   orthotropic material (shear modulus
**                   should be zero, however, this does
**                   not work in the *FREQUENCY step)
**
*HEADING
Model: air column
*NODE
     1,      0.000000,      0.000000,      0.000000
     2,      1.000000,      0.000000,      0.000000
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*ELEMENT, TYPE=C3D20   , ELSET=B1
     1,     1,    10,    95,    19,    61,   105,   222,   192,     9,    93,
           94,    20,   104,   220,   221,   193,    62,   103,   219,   190
     2,    10,     2,    13,    95,   105,    34,   134,   222,    11,    12,
           96,    93,   106,   133,   223,   220,   103,    33,   132,   219
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*NSET, NSET=CN7
    97,    96,    95,    94,    93,    20
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*NSET,NSET=Nall,GENERATE
1,261
*ELSET,ELSET=Eall,GENERATE
1,32
*MATERIAL,NAME=EL
*ELASTIC,TYPE=ORTHO
0.,0.,0.,0.,0.,0.,0.,0.,
0.,0.
287058.,287058.,287058.,287058.,287058.,287058.,287058.,287058.,
287058.,1000.
*DENSITY
1.
*SOLID SECTION,ELSET=Eall,MATERIAL=EL
*NSET,NSET=Nfixx
1,
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*NSET,NSET=Nfixy
1,
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*NSET,NSET=Nfixz
1,
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*NSET,NSET=GIBO
5,
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*BOUNDARY
Nfixx,1,1
Nfixy,2,2
Nfixz,3,3
*AMPLITUDE,NAME=A1
0.,0.,1.E-4,1.,10.,1.
*AMPLITUDE,NAME=A1EQU, EQUATION
T/3.E-1
*INITIAL CONDITIONS,TYPE=TEMPERATURE
Nall,273.
*NSET,NSET=MID
117
** ++++++++++++++++++++++++++++++++++++++
*STEP
*FREQUENCY,STORAGE=YES
30
*TEMPERATURE
Nall,273.
*END STEP
** ++++++++++++++++++++++++++++++++++++++
*STEP,INC=300
*MODAL DYNAMIC
1.E-3,3.E-1
*DLOAD,AMPLITUDE=A1EQU
29, P2, -1.000000
30, P2, -1.000000
32, P2, -1.000000
31, P2, -1.000000
*NODE PRINT,NSET=MID,FREQUENCY=25
U
*NODE FILE
U, NT, RF
*EL FILE
S, E
*END STEP
