**
**   Structure: half open air column (ideal gas)
**   Test objective: modal dynamic calculation:
**                   pressure increase on open end
**                   air is modeled as linear elastic
**                   orthotropic material (shear modulus
**                   should be zero, however, this does
**                   not work in the *FREQUENCY step)
**
*HEADING
Model: air column
*NODE
     1,      0.000000,      0.000000,      0.000000
     2,      1.000000,      0.000000,      0.000000
     3,      1.000000,      1.000000,      0.000000
     4,      0.000000,      1.000000,      0.000000
     5,      0.000000,      0.000000,      8.000000
     6,      1.000000,      0.000000,      8.000000
     7,      1.000000,      1.000000,      8.000000
     8,      0.000000,      1.000000,      8.000000
     9,      0.250000,      0.000000,      0.000000
    10,      0.500000,      0.000000,      0.000000
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*ELEMENT, TYPE=C3D20   , ELSET=B1
     1,     1,    10,    95,    19,    61,   105,   222,   192,     9,    93,
           94,    20,   104,   220,   221,   193,    62,   103,   219,   190
     2,    10,     2,    13,    95,   105,    34,   134,   222,    11,    12,
           96,    93,   106,   133,   223,   220,   103,    33,   132,   219
     3,    19,    95,    16,     4,   192,   222,   163,    79,    94,    97,
           17,    18,   221,   224,   164,   191,   190,   219,   161,    78
     4,    95,    13,     3,    16,   222,   134,    64,   163,    96,    14,
           15,    97,   223,   135,   162,   224,   219,   132,    63,   161
     5,    61,   105,   222,   192,    59,   109,   228,   196,   104,   220,
          221,   193,   108,   226,   227,   197,    60,   107,   225,   194
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*NSET, NSET=CN7
    97,    96,    95,    94,    93,    20,    19,    18,    17,    16,    15,
    14,    13,    12,    11,    10,     9,     4,     3,     2,     1
*NSET,NSET=Nall,GENERATE
1,261
*ELSET,ELSET=Eall,GENERATE
1,32
*MATERIAL,NAME=EL
*ELASTIC,TYPE=ORTHO
0.,0.,0.,0.,0.,0.,0.,0.,
0.,0.
287058.,287058.,287058.,287058.,287058.,287058.,287058.,287058.,
287058.,1000.
*DENSITY
1.
*SOLID SECTION,ELSET=Eall,MATERIAL=EL
*NSET,NSET=Nfixx
1,
2,
3,
4,
5,
6,
7,
8,
12,
13,
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*NSET,NSET=Nfixy
1,
2,
3,
4,
5,
6,
7,
8,
9,
10,
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*NSET,NSET=Nfixz
1,
2,
3,
4,
9,
10,
11,
12,
13,
14,
15,
16,
17,
18,
19,
20,
93,
94,
95,
96,
97,
*NSET,NSET=GIBO
5,
6,
7,
8,
21,
22,
23,
24,
25,
26,
27,
28,
29,
30,
31,
32,
98,
99,
100,
101,
102,
*BOUNDARY
Nfixx,1,1
Nfixy,2,2
Nfixz,3,3
*AMPLITUDE,NAME=A1
0.,0.,1.E-4,1.,10.,1.
*AMPLITUDE,NAME=A1EQUTOTTIME, EQUATION, TIME=TOTAL TIME
T/3.E-1
*INITIAL CONDITIONS,TYPE=TEMPERATURE
Nall,273.
*NSET,NSET=MID
117
** ++++++++++++++++++++++++++++++++++++++
*STEP
*FREQUENCY,STORAGE=YES
30
*TEMPERATURE
Nall,273.
*END STEP
** ++++++++++++++++++++++++++++++++++++++
*STEP,INC=300
*MODAL DYNAMIC
1.E-3,3.E-1
*DLOAD,AMPLITUDE=A1EQUTOTTIME
29, P2, -1.000000
30, P2, -1.000000
32, P2, -1.000000
31, P2, -1.000000
*NODE PRINT,NSET=MID,FREQUENCY=25
U
*NODE FILE
U, NT, RF
*EL FILE
S, E
*END STEP
