**
**   Structure: half open air column
**   Test objective: modal dynamic calculation:
**                   pressure increase on open end
**
*HEADING
Model: air column
*NODE
     1,      0.000000,      0.000000,      0.000000
     2,      1.000000,      0.000000,      0.000000
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*ELEMENT, TYPE=C3D20R   , ELSET=B1
     1,     1,    10,    95,    19,    61,   105,   222,   192,     9,    93,
           94,    20,   104,   220,   221,   193,    62,   103,   219,   190
     2,    10,     2,    13,    95,   105,    34,   134,   222,    11,    12,
           96,    93,   106,   133,   223,   220,   103,    33,   132,   219
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*NSET, NSET=CN7
    97,    96,    95,    94,    93,    20
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*NSET,NSET=NALL,GENERATE
1,261
*ELSET,ELSET=Eall,GENERATE
1,32
*MATERIAL,NAME=EL
*CONDUCTIVITY
1.
*SPECIFIC HEAT
8.6505E-6
*DENSITY
1.
*SOLID SECTION,ELSET=Eall,MATERIAL=EL
*NSET,NSET=GIBO
5,
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*BOUNDARY
GIBO,11,11,0.
***AMPLITUDE,NAME=A1
**0.,0.,1.E-4,1.,10.,1.
*AMPLITUDE,NAME=EQUTOTTIME, EQUATION, TIME=TOTAL TIME
***AMPLITUDE,NAME=EQUTOTTIME, EQUATION
10000.*T
*NSET,NSET=MID
117
** ++++++++++++++++++++++++++++++++++++++
*STEP
*HEAT TRANSFER,FREQUENCY,STORAGE=YES
10
*END STEP
** ++++++++++++++++++++++++++++++++++++++
*STEP
*HEAT TRANSFER,MODAL DYNAMIC
1.E-5,1.E-4
*BOUNDARY,AMPLITUDE=EQUTOTTIME
GIBO,11,11,1.
***NODE PRINT,NSET=MID
**NT
*NODE PRINT,NSET=GIBO
NT
*NODE FILE
NT
*END STEP
