**
**   Structure: cantilever beam.
**   Test objective: restart capability (reading part).
**   Before running this example, please run example beamwrite2
**   and copy beamwrite2.rout to beamread2.rin
**
**
**   Changes:
**   2026/04/22: *NODE FILE and *EL FILE output
**
*RESTART,READ
*STEP,NLGEOM
*STATIC
1.,1.
*DLOAD,AMPLITUDE=A1
29, P2, -200.000000
30, P2, -200.000000
31, P2, -200.000000
32, P2, -200.000000
*NODE FILE
U
*EL FILE
S, E
*END STEP
