**
**   Structure: cantilever beam.
**   Test objective: restart capability (reading part).
**                   defining an extra amplitude
**   Before running this example, please run example beamwrite
**   and copy beamwrite.rout to beamread5.rin
**
**   Created as copy from beamread4.inp and added equation amplitude
**
**   Changes:
**   2026/04/22: *NODE FILE and *EL FILE output
**
*RESTART,READ
*AMPLITUDE, NAME=CUBIC, EQUATION
T*T*Txx
**+1.5*T*T*T
*STEP,NLGEOM
*STATIC
1.,1.
*AMPLITUDE,NAME=A2
0.,0.,1.,.5
*DLOAD,AMPLITUDE=CUBIC
***DLOAD,AMPLITUDE=A1
29, P2, -200.000000
30, P2, -200.000000
*DLOAD,AMPLITUDE=A2
31, P2, -200.000000
32, P2, -200.000000
*NODE FILE
U
*EL FILE
S, E
*END STEP
