**
**   Changes:
**   2026/04/20: Writing into frd file.
**
**   Structure: cantilever beam.
**   Test objective: restart capability (reading part).
**   Before running this example, please run example beamwrite
**   and copy beamwritexlen.rout to beamreadxlen.rin
**
*RESTART,READ
** ++++++++++++++++++++++++++++++++++++++++++++++++++++++
*STEP,NLGEOM
*STATIC
1.,1., 1.E-05, 0.1
*DLOAD,AMPLITUDE=A1SIN
***DLOAD,AMPLITUDE=A1
***DLOAD,AMPLITUDE=A1
29, P2, -200.000000
30, P2, -200.000000
31, P2, -200.000000
32, P2, -200.000000
*NODE FILE
U,
*EL FILE
S, E
*END STEP
