**
**   Structure: cantilever beam.
**   Test objective: restart capability (writing part).
**
*HEADING
Model: beam     Date: 10-Mar-1998
*NODE
     1,      0.000000,      0.000000,      0.000000
     2,      1.000000,      0.000000,      0.000000
     3,      1.000000,      1.000000,      0.000000
     4,      0.000000,      1.000000,      0.000000
     5,      0.000000,      0.000000,      8.000000
     6,      1.000000,      0.000000,      8.000000
     7,      1.000000,      1.000000,      8.000000
     8,      0.000000,      1.000000,      8.000000
     9,      0.250000,      0.000000,      0.000000
    10,      0.500000,      0.000000,      0.000000
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*ELEMENT, TYPE=C3D20R   , ELSET=Eall
     1,     1,    10,    95,    19,    61,   105,   222,   192,     9,    93,
           94,    20,   104,   220,   221,   193,    62,   103,   219,   190
     2,    10,     2,    13,    95,   105,    34,   134,   222,    11,    12,
           96,    93,   106,   133,   223,   220,   103,    33,   132,   219
     3,    19,    95,    16,     4,   192,   222,   163,    79,    94,    97,
           17,    18,   221,   224,   164,   191,   190,   219,   161,    78
     4,    95,    13,     3,    16,   222,   134,    64,   163,    96,    14,
           15,    97,   223,   135,   162,   224,   219,   132,    63,   161
     5,    61,   105,   222,   192,    59,   109,   228,   196,   104,   220,
          221,   193,   108,   226,   227,   197,    60,   107,   225,   194
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*NSET, NSET=FIX
    97,    96,    95,    94,    93,    20,    19,    18,    17,    16,    15,
    14,    13,    12,    11,    10,     9,     4,     3,     2,     1
*BOUNDARY
FIX, 1
*BOUNDARY
FIX, 2
*BOUNDARY
FIX, 3
*NSET,NSET=Nall,GENERATE
1,261
*MATERIAL,NAME=EL
*ELASTIC
  210000.0,        .3
*DENSITY
7.8E-9
*SOLID SECTION,ELSET=Eall,MATERIAL=EL
*AMPLITUDE,NAME=A1
0.,0.,1.,1.
*AMPLITUDE,NAME=A1EQU, EQUATION
T*T
**T
*AMPLITUDE,NAME=A1SIN, EQUATION
SIN(T*3.14159265/2.)
+SIN(T*3.14159265/2.)
+SIN(T*3.14159265/2.)
+SIN(T*3.14159265/2.)
+SIN(T*3.14159265/2.)
+SIN(T*3.14159265/2.)
+SIN(T*3.14159265/2.)
+SIN(T*3.14159265/2.)
+SIN(T*3.14159265/2.)
+SIN(T*3.14159265/2.)
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*AMPLITUDE,NAME=A1SINSUM, EQUATION
0.5*(T+SIN(T*PI/2.))
*AMPLITUDE,NAME=A1SQRT, EQUATION
SQRT(T)
** +++++++++++++++++++++++++++++++++++++++
*STEP,NLGEOM,INC=100
*STATIC,DIRECT
1.,1.
*RESTART,WRITE,FREQUENCY=1
*DLOAD,AMPLITUDE=A1SIN
***DLOAD,AMPLITUDE=A1SQRT
***DLOAD,AMPLITUDE=A1EQU
***DLOAD,AMPLITUDE=A1
***DLOAD
29, P2, -100.000000
30, P2, -100.000000
31, P2, -100.000000
32, P2, -100.000000
*NODE FILE
U,
*EL FILE
S, E
*END STEP
** +++++++++++++++++++++++++++++++++++++++
*STEP,NLGEOM,INC=100
*STATIC,DIRECT
1.,1.
*NODE PRINT,NSET=Nall
U
*EL PRINT,ELSET=Eall
S, E
*NODE FILE
U,
*EL FILE
S, E
*END STEP
