**
** Model source:
** https://calculix.discourse.group/t/snap-fit-contact-snagging-problem/2277
**
** Generated by Mecway 24
*NODE, NSET=NALL
1,0.0133263985941,0.007498873716487,0.005
2,0.002,0.00834,0.005
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*ELEMENT,TYPE=C3D20
1,92,138,151,93,1166,1169,1168,1167,2331,2332,2333,2334,2339,2340,2341,
2342,2335,2336,2337,2338
2,93,151,152,94,1167,1168,1171,1170,2333,2343,2344,2345,2341,2348,2349,
2350,2338,2337,2346,2347
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*ELEMENT,TYPE=C3D15
628,269,264,272,1965,1952,1969,5955,6004,5988,5957,6005,5989,5951,5897,5974
630,271,265,266,1968,1954,1956,6006,5913,5968,6007,5918,5971,5969,5908,5916
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*ELSET,ELSET=Component
1
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*SURFACE,NAME=FIXE
556,S3
573,S5
574,S6
575,S6
576,S6
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988,S6
*SURFACE,NAME=MOVIL
524,S6
525,S6
526,S6
527,S6
679,S5
*SURFACE,NAME=SIM_Z
1,S1
1,S2
2,S1
2,S2
3,S1
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1004,S2
*SURFACE,NAME=MASTER
95,S6
96,S6
97,S6
98,S6
99,S6
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750,S4
*SURFACE,NAME=SLAVE
510,S6
512,S6
513,S6
514,S6
515,S6
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683,S6
*MATERIAL,NAME=TEFLON_75-23-2
*ELASTIC,TYPE=ISOTROPIC
10000000000,0.3
*DENSITY
2010
*SOLID SECTION,ELSET=Component,MATERIAL=TEFLON_75-23-2
*BOUNDARY
1,3,,0
2,3,,0
3,3,,0
4,3,,0
5,3,,0
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7829,3,,0
*AMPLITUDE,NAME=A1ORIG
0,0
1,-0.0105
*AMPLITUDE,NAME=A_1, EQUATION
-0.0105*T
*CONTACT PAIR,INTERACTION=SI_2,TYPE=SURFACE TO SURFACE
SLAVE,MASTER
*SURFACE INTERACTION,NAME=SI_2
*SURFACE BEHAVIOR,PRESSURE-OVERCLOSURE=LINEAR
1000000000000
*NSET, NSET=NBOUN
  35,  41,1067,1068,1069,1070
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** +++++++++++++++++++++++++++++++++++++++++++++++++++++++++++++++++
*STEP
*STATIC
** *STATIC,TIME RESET
*EL FILE
ENER
*NODE FILE
U
*END STEP
** +++++++++++++++++++++++++++++++++++++++++++++++++++++++++++++++++
*STEP,NLGEOM=YES,INC=100,AMPLITUDE=STEP
*STATIC,DIRECT
0.01,1,0,0
*BOUNDARY,AMPLITUDE=A_1
NBOUN,1,,1
*NODE FILE,GLOBAL=YES
U,RF
*EL FILE
S,NOE,E,ENER
*CONTACT FILE
CDIS,CSTR
*END STEP
