**
**   Structure: cube with convection boundary condition;
**   Test objective: TIME RESET
**
**   Changes vs. original ccx test case:
**   2026/05/19: Only step was duplicated to test the TIME RESET functionality more thoroughly
**
*HEADING
standard ccx test case oneel20rs.inp enriched through additional step and output variables.
*NODE, NSET=Nall
       1,  1.00000e+00,  1.00000e+00,  0.00000e+00
       2,  1.00000e+00,  0.00000e+00,  0.00000e+00
       3,  1.00000e+00,  0.00000e+00,  1.00000e+00
       4,  1.00000e+00,  1.00000e+00,  1.00000e+00
       5,  0.00000e+00,  1.00000e+00,  0.00000e+00
       6,  0.00000e+00,  0.00000e+00,  0.00000e+00
       7,  0.00000e+00,  0.00000e+00,  1.00000e+00
       8,  0.00000e+00,  1.00000e+00,  1.00000e+00
       9,  1.00000e+00,  5.00000e-01,  0.00000e+00
      10,  1.00000e+00,  0.00000e+00,  5.00000e-01
      11,  1.00000e+00,  5.00000e-01,  1.00000e+00
      12,  1.00000e+00,  1.00000e+00,  5.00000e-01
      13,  5.00000e-01,  1.00000e+00,  0.00000e+00
      14,  5.00000e-01,  0.00000e+00,  0.00000e+00
      15,  5.00000e-01,  0.00000e+00,  1.00000e+00
      16,  5.00000e-01,  1.00000e+00,  1.00000e+00
      17,  0.00000e+00,  5.00000e-01,  0.00000e+00
      18,  0.00000e+00,  0.00000e+00,  5.00000e-01
      19,  0.00000e+00,  5.00000e-01,  1.00000e+00
      20,  0.00000e+00,  1.00000e+00,  5.00000e-01
*ELEMENT, TYPE=C3D20R, ELSET=Eall
     1,     1,     2,     3,     4,     5,     6,     7,     8,     9,    10,
          11,    12,    17,    18,    19,    20,    13,    14,    15,    16
*NSET,NSET=FIX
5,6,7,8,17,18,19,20
*INITIAL CONDITIONS,TYPE=TEMPERATURE
Nall,0.
*MATERIAL,NAME=EL
*CONDUCTIVITY
50.,0.
*PHYSICAL CONSTANTS,ABSOLUTE ZERO=-273.15,STEFAN BOLTZMANN=5.669E-8
*SOLID SECTION,ELSET=Eall,MATERIAL=EL
*AMPLITUDE, NAME=QUADEQU, EQUATION
T*T
**
** ++++++++++++++++++++++++++++++++++++++++++++++++++++++++++++++++++++++++++
*STEP,INC=100
*HEAT TRANSFER,STEADY STATE,TIME RESET
.5,1.
*BOUNDARY
FIX,11,11,0.
** The AMPLITUDE parameter allows for the specification of an amplitude
** by which the sink temperature is scaled (mainly used for dynamic calculations).
** Thus, in that case the sink temperature values entered on the *FILM card
** are interpreted as reference values to be multiplied with the (time dependent)
** amplitude value to obtain the actual value. At the end of the step the reference
** value is replaced by the actual value at that time.
*FILM, AMPLITUDE=QUADEQU
**,, sink temperature, film coefficient:
1,F1,-12.,10.
*NODE PRINT,NSET=Nall
NT,RFL
*EL PRINT,ELSET=Eall
HFL
**
*NODE FILE
** RFL [RFL]: External concentrated heat sources. Total flux
RFL, NT
*EL FILE
** HFL: heat flux in a structure
HFL
*END STEP
** ++++++++++++++++++++++++++++++++++++++++++++++++++++++++++++++++++++++++++
*STEP,INC=100
*HEAT TRANSFER,STEADY STATE,TIME RESET
.5,1.
*BOUNDARY
FIX,11,11,0.
*FILM, AMPLITUDE=QUADEQU
1,F1,-12.,10.
*NODE PRINT,NSET=Nall
NT,RFL
*EL PRINT,ELSET=Eall
HFL
**
*NODE FILE
** RFL [RFL]: External concentrated heat sources. Total flux
RFL, NT
*EL FILE
** HFL: heat flux in a structure
HFL
*END STEP
