**
**   Structure: two cantilever beams.
**   Test objective: *UNCOUPLED TEMPERATURE-DISPLACEMENT
**                   followed by a *HEAT TRANSFER and
**                   *STATIC step
**
*HEADING
Model: 2 beams    Date: 10-Sept-2004
*NODE, NSET=Nall
       1,  1.00000e+00,  1.00000e+00,  0.00000e+00
       2,  1.00000e+00,  5.00000e-01,  0.00000e+00
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*ELEMENT, TYPE=C3D20, ELSET=Eall
     1,     1,     2,     3,     4,     5,     6,     7,     8,     9,    10,
          11,    12,    17,    18,    19,    20,    13,    14,    15,    16
     2,     2,    21,    22,     3,     6,    23,    24,     7,    25,    26,
          27,    10,    30,    31,    32,    18,    14,    28,    29,    15
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*NSET,NSET=Nfix
1,
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*NSET,NSET=Nt0
262,
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*NSET,NSET=Nt1000
33,
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*BOUNDARY
Nfix,3,3
45,1,2
306,1,2
33,1,1
294,1,1
*MATERIAL,NAME=EL
*CONDUCTIVITY
50.,0.
*ELASTIC
210000.,.3
*EXPANSION
25.E-6
*DENSITY
7.8E-9
*SPECIFIC HEAT
446.E6
*SOLID SECTION,ELSET=Eall,MATERIAL=EL
*INITIAL CONDITIONS,TYPE=TEMPERATURE
Nall,0.
*PHYSICAL CONSTANTS,ABSOLUTE ZERO=-273.15,STEFAN BOLTZMANN=5.669E-8
**
*AMPLITUDE, NAME=2_CONST, EQUATION
2.
*AMPLITUDE, NAME=500_CONST, EQUATION
500.
** +++++++++++++++++++++++++++++++++++++++++++++++++++++++
*STEP,NLGEOM
*UNCOUPLED TEMPERATURE-DISPLACEMENT,STEADY STATE
.5,1.
*CONTROLS,PARAMETERS=TIME INCREMENTATION
6,16,9,32,20,4,,5,,,
0.25,0.5,0.75,,,,1.5,,
*BOUNDARY, AMPLITUDE=500_CONST
Nt0,11,11,0.
Nt1000,11,11,1.
*RADIATE, AMPLITUDE=2_CONST
35, R2CR,0., 4.500000e-01
36, R2CR,0., 4.500000e-01
39, R2CR,0., 4.500000e-01
40, R2CR,0., 4.500000e-01
43, R2CR,0., 4.500000e-01
44, R2CR,0., 4.500000e-01
47, R2CR,0., 4.500000e-01
48, R2CR,0., 4.500000e-01
51, R2CR,0., 4.500000e-01
52, R2CR,0., 4.500000e-01
55, R2CR,0., 4.500000e-01
56, R2CR,0., 4.500000e-01
59, R2CR,0., 4.500000e-01
60, R2CR,0., 4.500000e-01
63, R2CR,0., 4.500000e-01
64, R2CR,0., 4.500000e-01
1, R1CR,0., 4.500000e-01
2, R1CR,0., 4.500000e-01
5, R1CR,0., 4.500000e-01
6, R1CR,0., 4.500000e-01
9, R1CR,0., 4.500000e-01
10, R1CR,0., 4.500000e-01
13, R1CR,0., 4.500000e-01
14, R1CR,0., 4.500000e-01
17, R1CR,0., 4.500000e-01
18, R1CR,0., 4.500000e-01
21, R1CR,0., 4.500000e-01
22, R1CR,0., 4.500000e-01
25, R1CR,0., 4.500000e-01
26, R1CR,0., 4.500000e-01
29, R1CR,0., 4.500000e-01
30, R1CR,0., 4.500000e-01
*NODE PRINT,NSET=Nall,FREQUENCY=2
NT,RFL,U
*EL PRINT,ELSET=Eall,FREQUENCY=2
HFL,S
**
*NODE FILE,FREQUENCY=2
NT,RFL,U
*EL FILE,FREQUENCY=2
HFL,S
*END STEP
** +++++++++++++++++++++++++++++++++++++++++++++++++++++++
*STEP
*HEAT TRANSFER
1.,1.
*BOUNDARY, AMPLITUDE=2_CONST
Nt1000,11,11,300.
*NODE PRINT,NSET=Nall
U
*EL PRINT,ELSET=Eall
*NODE FILE,FREQUENCY=2
NT,RFL,U
*EL FILE,FREQUENCY=2
HFL,S
*END STEP
*STEP
** +++++++++++++++++++++++++++++++++++++++++++++++++++++++
*STATIC
1.,1.
*NODE PRINT,NSET=Nall
U
*NODE FILE,FREQUENCY=2
NT,RFL,U
*EL FILE,FREQUENCY=2
HFL,S
*END STEP
