**
**   Structure: cylinder.
**   Test objective: multistage MPC's.
**
** Changes vs. multistage.inp:
** Output for Prepomax
**
*NODE, NSET=Nall
       1,  5.00000e+01,  5.20000e+01,  0.00000e+00
       2,  5.00000e+01,  5.00000e+01,  0.00000e+00
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*NSET,NSET=Ncyl,GENERATE
1,1156
*ELEMENT, TYPE=C3D20R, ELSET=Eall
     1,     1,     2,     3,     4,     5,     6,     7,     8,     9,    10,
          11,    12,    17,    18,    19,    20,    13,    14,    15,    16
     2,     4,     3,    21,    22,     8,     7,    23,    24,    11,    25,
          26,    27,    19,    30,    31,    32,    16,    15,    28,    29
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*NSET,NSET=ND1SL
5,
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*NSET,NSET=ND1SR
69,
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*NSET,NSET=ND2SL
504,
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*NSET,NSET=ND2SR
596,
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*NSET,NSET=NDEP
1096,
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*NSET,NSET=NIND
1,
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*ELSET,ELSET=EA1
1,
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*ELSET,ELSET=EA2
61,
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*TRANSFORM, NSET=Ncyl, TYPE=C
0.,0.,0., 1.,0.,0.
*AMPLITUDE, NAME=Amp1, DEFINITION=TABULAR
0.001, 1.0, 100000.0, 1.0
*AMPLITUDE, NAME=Amp_cos, EQUATION
cos(t*2*pi/10000.)
*BOUNDARY
507, 1, ,
511, 1, ,
515, 1, ,
519, 1, ,
523, 1, ,
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607, 3, ,
*SURFACE,NAME=SURF1,TYPE=NODE
ND1SL
*SURFACE,NAME=SURF2,TYPE=NODE
ND1SR
*TIE, NAME=TIE1, CYCLIC SYMMETRY,POSITION TOLERANCE=1.E-4
SURF1,SURF2
*CYCLIC SYMMETRY MODEL,N=18, TIE=TIE1, ELSET=EA1, NGRAPH=18
0.,0.,0., 1.,0.,0.
*SURFACE,NAME=SURF3,TYPE=NODE
ND2SL
*SURFACE,NAME=SURF4,TYPE=NODE
ND2SR
*TIE, NAME=TIE2, CYCLIC SYMMETRY,POSITION TOLERANCE=1.E-4
SURF3,SURF4
*CYCLIC SYMMETRY MODEL,N=12, TIE=TIE2, ELSET=EA2, NGRAPH=12
0.,0.,0., 1.,0.,0.
*SURFACE,NAME=SURF5,TYPE=NODE
NIND
*SURFACE,NAME=SURF6,TYPE=NODE
NDEP
*TIE, NAME=TIE3, MULTISTAGE,POSITION TOLERANCE=1.E-4
SURF5,SURF6
*MATERIAL,NAME=EL
*ELASTIC,TYPE=ISO
90000,0.343,293.15
113085,0.343,300.15
107845,0.343,400.15
102605,0.343,500.15
97365.2,0.343,600.15
93540,0.343,673.15
*DENSITY
4.43e-09
*SOLID SECTION, ELSET=Eall, MATERIAL=EL
*INITIAL CONDITIONS, TYPE=TEMPERATURE
Nall, 293.
*NSET,NSET=NOUT
477,940
** ++++++++++++++++++++++++++++++++++++++++++++++++++++
*STEP
*FREQUENCY,STORAGE=YES
20
*TEMPERATURE
Nall, 293.
*SELECT CYCLIC SYMMETRY MODES,NMIN=1,NMAX=1
*END STEP
** ++++++++++++++++++++++++++++++++++++++++++++++++++++
*STEP
*STEADY STATE DYNAMICS
0,5000
*DLOAD,OP=NEW
*MODAL DAMPING,RAYLEIGH
1, 400, 5000.
*CLOAD, LOAD CASE=1, AMPLITUDE=Amp_cos,SECTOR=1
477,3,1.00000
*CLOAD, LOAD CASE=1, AMPLITUDE=Amp_cos,SECTOR=2
477,3,0.93969
*CLOAD, LOAD CASE=1, AMPLITUDE=Amp_cos,SECTOR=3
477,3,0.76604
*CLOAD, LOAD CASE=1, AMPLITUDE=Amp_cos,SECTOR=4
477,3,0.50000
*CLOAD, LOAD CASE=1, AMPLITUDE=Amp_cos,SECTOR=5
477,3,0.17365
*CLOAD, LOAD CASE=1, AMPLITUDE=Amp_cos,SECTOR=6
477,3,-0.17365
*CLOAD, LOAD CASE=1, AMPLITUDE=Amp_cos,SECTOR=7
477,3,-0.50000
*CLOAD, LOAD CASE=1, AMPLITUDE=Amp_cos,SECTOR=8
477,3,-0.76604
*CLOAD, LOAD CASE=1, AMPLITUDE=Amp_cos,SECTOR=9
477,3,-0.93969
*CLOAD, LOAD CASE=1, AMPLITUDE=Amp_cos,SECTOR=10
477,3,-1.00000
*CLOAD, LOAD CASE=1, AMPLITUDE=Amp_cos,SECTOR=11
477,3,-0.93969
*CLOAD, LOAD CASE=1, AMPLITUDE=Amp_cos,SECTOR=12
477,3,-0.76604
*CLOAD, LOAD CASE=1, AMPLITUDE=Amp_cos,SECTOR=13
477,3,-0.50000
*CLOAD, LOAD CASE=1, AMPLITUDE=Amp_cos,SECTOR=14
477,3,-0.17365
*CLOAD, LOAD CASE=1, AMPLITUDE=Amp_cos,SECTOR=15
477,3,0.17365
*CLOAD, LOAD CASE=1, AMPLITUDE=Amp_cos,SECTOR=16
477,3,0.50000
*CLOAD, LOAD CASE=1, AMPLITUDE=Amp_cos,SECTOR=17
477,3,0.76604
*CLOAD, LOAD CASE=1, AMPLITUDE=Amp_cos,SECTOR=18
477,3,0.93969
*CLOAD, LOAD CASE=2, AMPLITUDE=Amp_cos,SECTOR=1
477,3,0.00000
*CLOAD, LOAD CASE=2, AMPLITUDE=Amp_cos,SECTOR=2
477,3,0.34202
*CLOAD, LOAD CASE=2, AMPLITUDE=Amp_cos,SECTOR=3
477,3,0.64279
*CLOAD, LOAD CASE=2, AMPLITUDE=Amp_cos,SECTOR=4
477,3,0.86603
*CLOAD, LOAD CASE=2, AMPLITUDE=Amp_cos,SECTOR=5
477,3,0.98481
*CLOAD, LOAD CASE=2, AMPLITUDE=Amp_cos,SECTOR=6
477,3,0.98481
*CLOAD, LOAD CASE=2, AMPLITUDE=Amp_cos,SECTOR=7
477,3,0.86603
*CLOAD, LOAD CASE=2, AMPLITUDE=Amp_cos,SECTOR=8
477,3,0.64279
*CLOAD, LOAD CASE=2, AMPLITUDE=Amp_cos,SECTOR=9
477,3,0.34202
*CLOAD, LOAD CASE=2, AMPLITUDE=Amp_cos,SECTOR=10
477,3,0.00000
*CLOAD, LOAD CASE=2, AMPLITUDE=Amp_cos,SECTOR=11
477,3,-0.34202
*CLOAD, LOAD CASE=2, AMPLITUDE=Amp_cos,SECTOR=12
477,3,-0.64279
*CLOAD, LOAD CASE=2, AMPLITUDE=Amp_cos,SECTOR=13
477,3,-0.86603
*CLOAD, LOAD CASE=2, AMPLITUDE=Amp_cos,SECTOR=14
477,3,-0.98481
*CLOAD, LOAD CASE=2, AMPLITUDE=Amp_cos,SECTOR=15
477,3,-0.98481
*CLOAD, LOAD CASE=2, AMPLITUDE=Amp_cos,SECTOR=16
477,3,-0.86603
*CLOAD, LOAD CASE=2, AMPLITUDE=Amp_cos,SECTOR=17
477,3,-0.64279
*CLOAD, LOAD CASE=2, AMPLITUDE=Amp_cos,SECTOR=18
477,3,-0.34202
*NODE PRINT,NSET=NOUT
u
** Output for visualization with Prepomax:
*NODE FILE, NSET=NALL
***NODE FILE
U,
***EL FILE, ELSET=EALL
***EL FILE, OUTPUT ALL
***EL FILE
*EL FILE, NSET=NALL
S, E
*END STEP
