*INCLUDE, INPUT=ovaltank.msh
*MATERIAL,NAME=Steel
*ELASTIC
2.9000E+07,0.3
*DENSITY
7.3500E-04

*SHELL SECTION,MATERIAL=Steel,ELSET=Eall,,OFFSET=0.0000E+00
3.7500E-01

*BOUNDARY
CURVE1,1,1,0
CURVE1,2,2,0
CURVE1,3,3,0

*BOUNDARY
CURVE2,1,1,0
CURVE2,2,2,0
CURVE2,3,3,0

*BOUNDARY
CURVE3,1,1,0
CURVE3,2,2,0
CURVE3,3,3,0

*BOUNDARY
CURVE4,1,1,0
CURVE4,2,2,0
CURVE4,3,3,0

*STEP
*STATIC
*AMPLITUDE,NAME=pressure_SURFACE2
0.,1
*DLOAD,AMPLITUDE=pressure_SURFACE2
*INCLUDE, INPUT=SURFACE2_0.dlo

*AMPLITUDE,NAME=pressure_SURFACE3
0.,1
*DLOAD,AMPLITUDE=pressure_SURFACE3
*INCLUDE, INPUT=SURFACE3_1.dlo

*AMPLITUDE,NAME=SURFACE4EQU, SHIFTY=0.5, EQUATION
0.5*T*T
**
*DLOAD,AMPLITUDE=SURFACE4EQU
*INCLUDE, INPUT=SURFACE4_2.dlo
**
*AMPLITUDE,NAME=SURFACE5EQU, SHIFTY=-1., EQUATION
2*T
*DLOAD,AMPLITUDE=SURFACE5EQU
*INCLUDE, INPUT=SURFACE5_3.dlo
*NODE FILE
U,
*EL FILE
S,
*END STEP
